# OpenSim document version 40000
ExternalLoads:
  datafile: C:\Users\Ekatarina\Dropbox\My_PC_LAPTOP-OF7GLRAD\Documents\WORK\hip\MotionStudy\MotionData\003\P03\Session2\Walking03\grf_original.mot
  ExternalForce [values shared by the 5 below unless stated]: force_expressed_in_body=ground
      point_expressed_in_body=ground
  ExternalForce plate1: applied_to_body=calcn_r force_identifier=plate1_ground_force_v
      point_identifier=plate1_ground_force_p torque_identifier=plate1_ground_torque_
  ExternalForce plate2: applied_to_body=calcn_l force_identifier=plate2_ground_force_v
      point_identifier=plate2_ground_force_p torque_identifier=plate2_ground_torque_
  ExternalForce plate3: applied_to_body=calcn_r force_identifier=plate3_ground_force_v
      point_identifier=plate3_ground_force_p torque_identifier=plate3_ground_torque_
  ExternalForce plate4: applied_to_body=calcn_l force_identifier=plate4_ground_force_v
      point_identifier=plate4_ground_force_p torque_identifier=plate4_ground_torque_
  ExternalForce plate5: applied_to_body=calcn_r force_identifier=plate5_ground_force_v
      point_identifier=plate5_ground_force_p torque_identifier=plate5_ground_torque_
